// COMSOL Multiphysics 5.5.0.292 model "132415ac_cnt19_0stanford_nosol.mph"
// Outline of the model tree

Parameters
  Vs = 0
  Vd = 0.4[V]
  Vg = 0.4[V]
  F = 10[MHz]
  Vac = 1[mV]
  Nvsi = (300/300)^(3/2)*1.04e19 [1/cm^3]
  Ncsi = (300/300)^(3/2)*2.8e19 [1/cm^3]
  d7 = 0.548[nm]  // CNT (7,0) diameter
  d8 = 0.62[nm]  // CNT (8,0) diameter
  d10 = 0.78[nm]  // CNT (10,0) diameter
  d11 = 0.86[nm]  // CNT (11,0) diameter
  d13 = 1.01[nm]  // CNT (13,0) diameter
  d14 = 1.09[nm]  // CNT (14,0) diameter
  d16 = 1.25[nm]  // CNT (16,0) diameter
  d17 = 1.33[nm]  // CNT (17,0) diameter
  d19 = 1.48[nm]  // CNT (19,0) diameter
  d20 = 1.56[nm]  // CNT (20,0) diameter

Geometry
  geom1 "Geometry 1" (2D, length unit nm)
    r1: Rectangle | size = {96, d19}
    r2: Rectangle (disabled) | pos = {-1.5, -1}; size = {1.5, 2.5}
    r3: Rectangle (disabled) | pos = {10, -1}; size = {1.5, 2.5}
    r4: Rectangle | pos = {0, -10[nm]}; size = {96, 10[nm]}
    b1: BezierPolygon "Bézier Polygon 1" (disabled) | p = {{3, 7}, {1, 1}}; degree = 1; w = {1, 1}
    r5: Rectangle (disabled) | pos = {0, -6}; size = {10, 4}
    b2: BezierPolygon "Bézier Polygon 2" | p = {{32, 64}, {d19, d19}}; degree = 1; w = {1, 1}
    fin: Finalize "Form Union"

Materials
  mat1: Common "Si - Silicon" on no domains
    def "Basic"
      relpermittivity = 11.7
      thermalconductivity = 131[W/(m*K)]
      density = 2329[kg/m^3]
      heatcapacity = 700[J/(kg*K)]
    AroraMobilityModel
      mun0_ref_arora = 1252[cm^2/(V*s)]
      mup0_ref_arora = 407[cm^2/(V*s)]
      mun_min_ref_arora = 88[cm^2/(V*s)]
      mup_min_ref_arora = 54.3[cm^2/(V*s)]
      Nn0_ref_arora = 1.26e17[1/cm^3]
      Np0_ref_arora = 2.35e17[1/cm^3]
      alpha0_arora = 0.88
      beta1_arora = -0.57
      beta2_arora = -2.33
      beta3_arora = -2.33
      beta4_arora = -0.146
      Tref_arora = 300[K]
    PowerLawMobilityModel
      mun0_pl = 1448[cm^2/(V*s)]
      mup0_pl = 473[cm^2/(V*s)]
      alphan_pl = 2.33
      alphap_pl = 2.23
      Tref_pl = 300[K]
    Auger "Auger recombination"
      Cn = 2.8e-31[cm^6/s]
      Cp = 9.9e-32[cm^6/s]
    Direct "Direct recombination"
      C = 0[cm^3/s]
    SRH "Shockley-Read-Hall recombination"
      taun = 10[us]
      taup = 10[us]
    FletcherMobilityModel
      F1_fl = 1.04e21[1/(cm^1*V*s)]
      F2_fl = 7.45e13[1/cm^2]
      Tref_fl = 300[K]
    CaugheyThomasMobilityModel
      alphan0_ct = 1.11
      alphap0_ct = 1.21
      vn0_ct = 1e7[cm/s]
      vp0_ct = 8.37e6[cm/s]
      betan1_ct = 0.66
      betap1_ct = 0.17
      betan2_ct = -0.87
      betap2_ct = -0.52
      Tref_ct = 300[K]
    SemicondMaterial "Semiconductor material"
      Eg0 = 1.12[V]
      chi0 = 4.05[V]
      Nv = (T/300[K])^(3/2)*1.04e19[1/cm^3]
      Nc = (T/300[K])^(3/2)*2.8e19[1/cm^3]
      mun = 1450[cm^2/(V*s)]
      mup = 500[cm^2/(V*s)]
    LombardiSurfaceMobilityModel
      deltan_ls = 5.82e14[V/s]
      deltap_ls = 2.05e14[V/s]
      mun1_ls = 4.75e7[cm^2/(V*s)]
      mup1_ls = 9.93e7[cm^2/(V*s)]
      mun2_ls = 1.74e5[cm^2/(V*s)]
      mup2_ls = 8.84e5[cm^2/(V*s)]
      alphan_ls = 0.125
      alphap_ls = 0.0317
      Tref_ls = 1[K]
      Eref_ls = 1[V/cm]
      Nref_ls = 1[1/cm^3]
    ImpactIonization
      an = 0.426
      ap = 0.243
      bn = 4.81E5[V/cm]
      bp = 6.53E5[V/cm]
      cnii = 3.05E-4
      cpii = 5.35E-4
      dn = 6.86E-4
      dp = 5.67E-4
    SlotboomModel
      Eref_sb = 0.00692[V]
      Nref_sb = 1.3e17[1/cm^3]
      alpha_sb = 0.5
    JainRoulstonModel
      An_jr = 3.5e-8[V]
      Bn_jr = 0[V]
      Cn_jr = 0[V]
      Ap_jr = 3.5e-8[V]
      Bp_jr = 0[V]
      Cp_jr = 0[V]
      Nref_jr = 1[1/cm^3]
      alpha_jr = 0.5
  mat2: Common "C - Diamond" (disabled) on domains 2
    def "Basic"
      relpermittivity = 5.7
      thermalconductivity = 2500[W/(m*K)]
      density = 3515[kg/m^3]
      heatcapacity = 516[J/(kg*K)]
    SemicondMaterial "Semiconductor material"
      Eg0 = 5.5[V]
      chi0 = 0.35[V]
      Nv = 1e26[1/m^3]
      Nc = 1e25[1/m^3]
      mun = 2000[cm^2/(V*s)]
      mup = 2000[cm^2/(V*s)]
  mat3: Common "Au - Gold" (disabled) on no domains
    def "Basic"
      electricconductivity = 45.6e6[S/m]
      thermalexpansioncoefficient = 14.2e-6[1/K]
      heatcapacity = 129[J/(kg*K)]
      density = 19300[kg/m^3]
      thermalconductivity = 317[W/(m*K)]
      relpermittivity = -8.4953
    Enu "Young's modulus and Poisson's ratio"
      youngsmodulus = 70e9[Pa]
      poissonsratio = 0.44
  mat4: Common "Al - Aluminum / Aluminium" (disabled) on no domains
    def "Basic"
      electricconductivity = 35.5e6[S/m]
      thermalexpansioncoefficient = 23.1e-6[1/K]
      heatcapacity = 904[J/(kg*K)]
      density = 2700[kg/m^3]
      thermalconductivity = 237[W/(m*K)]
    Enu "Young's modulus and Poisson's ratio"
      youngsmodulus = 70.0e9[Pa]
      poissonsratio = 0.35
  mat7: Common "SiO2 - Silicon oxide" on domains 1
    def "Basic"
      electricconductivity = 0[S/m]
      thermalexpansioncoefficient = 0.5e-6[1/K]
      heatcapacity = 730[J/(kg*K)]
      relpermittivity = 4.2
      density = 2200[kg/m^3]
      thermalconductivity = 1.4[W/(m*K)]
    Enu "Young's modulus and Poisson's ratio"
      youngsmodulus = 70e9[Pa]
      poissonsratio = 0.17
  mat5: Common "ZnO - Zinc oxide" on no domains
    def "Basic"
      electricconductivity = 0[S/m]
      relpermittivity = 8.3
      density = 5676[kg/m^3]
      thermalconductivity = 6[W/(m*K)]
    Enu "Young's modulus and Poisson's ratio"
      youngsmodulus = 210e9[Pa]
      poissonsratio = 0.33
  mat8: Common "CNT 7,0" on domains 2
    def "Basic"
      relpermittivity = 1
    SemicondMaterial "Semiconductor material"
      Eg0 = 1.53
      chi0 = 3.5
      Nv = 3.51e+24
      Nc = 7.57e+24
      mun = 1.31e3[cm^2/(V*s)]
      mup = 0.25e3[cm^2/(V*s)]
  mat9: Common "CNT 8,0" on domains 2
    def "Basic"
      relpermittivity = 1
    SemicondMaterial "Semiconductor material"
      Eg0 = 1.34
      chi0 = 3.5
      Nv = 1.82e+25
      Nc = 8.34e+24
      mun = 0.92e3[cm^2/(V*s)]
      mup = 128e3[cm^2/(V*s)]
  mat6: Common "CNT 10,0" on domains 2
    def "Basic"
      relpermittivity = 1
    SemicondMaterial "Semiconductor material"
      Eg0 = 1.07
      chi0 = 3.5
      Nv = 3.52e+24
      Nc = 3.92e+24
      mun = 15.5e3[cm^2/(V*s)]
      mup = 0.41e3[cm^2/(V*s)]
  mat10: Common "CNT 11,0" on domains 2
    def "Basic"
      relpermittivity = 1
    SemicondMaterial "Semiconductor material"
      Eg0 = 0.97
      chi0 = 3.5
      Nv = 9.95E+24
      Nc = 1.16e+25
      mun = 0.14e3[cm^2/(V*s)]
      mup = 224e3[cm^2/(V*s)]
  mat11: Common "CNT 13,0" on domains 2
    def "Basic"
      relpermittivity = 1
    SemicondMaterial "Semiconductor material"
      Eg0 = 0.82
      chi0 = 3.5
      Nv = 3.32E+24
      Nc = 3.13e+24
      mun = 65.6e3[cm^2/(V*s)]
      mup = 0.56e3[cm^2/(V*s)]
  mat12: Common "CNT 14,0" on domains 2
    def "Basic"
      relpermittivity = 1
    SemicondMaterial "Semiconductor material"
      Eg0 = 0.76
      chi0 = 3.5
      Nv = 6.58E+24
      Nc = 7.57e+24
      mun = 0.28e3[cm^2/(V*s)]
      mup = 367e3[cm^2/(V*s)]
  mat13: Common "CNT 16,0" on domains 2
    def "Basic"
      relpermittivity = 1
    SemicondMaterial "Semiconductor material"
      Eg0 = 0.67
      chi0 = 3.5
      Nv = 3.13E+24
      Nc = 2.95e+24
      mun = 130e3[cm^2/(V*s)]
      mup = 0.89e3[cm^2/(V*s)]
  mat14: Common "CNT 17,0" on domains 2
    def "Basic"
      relpermittivity = 1
    SemicondMaterial "Semiconductor material"
      Eg0 = 0.63
      chi0 = 3.5
      Nv = 4.97E+24
      Nc = 5.42e+24
      mun = 0.52e3[cm^2/(V*s)]
      mup = 571e3[cm^2/(V*s)]
  mat15: Common "CNT 19,0" on domains 2
    def "Basic"
      relpermittivity = 1
    SemicondMaterial "Semiconductor material"
      Eg0 = 0.56
      chi0 = 4.8
      Nv = 2.77E+24
      Nc = 2.59e+24
      mun = 209e3[cm^2/(V*s)]
      mup = 1.24e3[cm^2/(V*s)]
  mat16: Common "CNT 20,0" (disabled) on domains 2
    def "Basic"
      relpermittivity = 1
    SemicondMaterial "Semiconductor material"
      Eg0 = 0.53
      chi0 = 4.4-Eg0/2
      Nv = 3.72E+24
      Nc = 4.33e+24
      mun = 0.88e3[cm^2/(V*s)]
      mup = 945e3[cm^2/(V*s)]

Physics
  semi: Semiconductor on domains 2
    dependent variable V
    d.d = 1e-9[m]
    ModelProperties.CarrierStatistics = FermiDirac
    smm1: SemiconductorMaterialModel (default)
    ins1: Insulation (default)
    zc1: ZeroCharge (default)
    ii1: InsulatorInterface (default)
    cont1: Continuity "Continuity/Heterojunction 1" (default)
    init1: init "Initial Values 1" (default)
    ccn1: ChargeConservation (disabled) on no domains
    gc1: GateContact "Thin Insulator Gate 1" on boundaries 6
      V0 = Vg
      ContinuationType = Interface
      epsilon_ins = 16
      d_ins = 4[nm]
      Phi = 4.5[V]
      hp1: HarmonicPerturbation on all boundaries | V0 = Vac
    mc1: MetalContact "Source" on boundaries 3
      ContactType = ohmic
      SpecifyUsing = richardsons
      SpecifyBarrierHeight = userdef
      TerminalName = Source
      V0 = Vs
    mc2: MetalContact "Drain" on boundaries 9
      ContactType = ohmic
      SpecifyBarrierHeight = userdef
      TerminalName = Drain
      V0 = Vd
      hp1: HarmonicPerturbation on all boundaries | V0 = Vac
    gc2: GateContact "Thin Insulator Gate 2" (disabled) on boundaries 4
      V0 = 0
      epsilon_ins = 4
      d_ins = 10[um]
      Phi = 4.5[V]
    mc3: MetalContact "Base" (disabled) on no boundaries
    term1: Terminal (disabled) on no boundaries | TerminalName = Gate; TerminalType = Voltage; V0 = Vg
    term2: Terminal (disabled) on no boundaries | TerminalType = Voltage; V0 = Vd

Mesh
  mesh1 "Mesh 1"
    size: MeshSizeDefault | hmax = 5.09; hmin = 0.0288; hcurve = 0.3; hgrad = 1.3; hauto = 4
    map1: Map "Mapped 1" on domains 2
      dis1: Distribution on boundaries 3, 5-7 | numelem = 75
    fq1: FreeQuad on remaining entities

Studies
  std1 "Id vs Vg"
    stat: Stationary
      useparam = on
      sweeptype = filled
      pname = {Vd, Vg}
      plistarr = {range(0,0.1,0.3) range(0.5,0.1,0.9), range(0,0.1,0.8)}
      punit = {V, V}
  std2 "Id vs Vd"
    stat: Stationary
      initstudy = zero
      useparam = on
      sweeptype = filled
      pname = {Vg, Vd}
      plistarr = {-0.5, range(0,-0.1,-0.8)}
      punit = {V, V}
  std3 "gm vs Id"
    stat: Stationary
      useinitsol = on
      initmethod = sol
      initstudy = std1
      useparam = on
      sweeptype = filled
      pname = Vg
      plistarr = range(0.3,0.1,0.8)
      punit = V
    frlin: Frequencylinearized "Frequency Domain Perturbation"
      punit = GHz
      plist = 10
      disabledphysics = semi/mc2/hp1
      useparam = on
  std4 "gm0 vs Id"
    stat: Stationary
      useparam = on
      sweeptype = filled
      pname = Vd
      plistarr = range(0,0.05,0.6) range(1,0.5,4)
      punit = V
    frlin: Frequencylinearized "Frequency Domain Perturbation"
      plist = F
      disabledphysics = semi/gc1/hp1
      useparam = on
      sweeptype = filled
  std5 "Small signal"
    stat: Stationary | useparam = on; sweeptype = filled; pname = Vg; plistarr = range(0,0.01,0.6); punit = V
    frlin: Frequencylinearized "Frequency Domain Perturbation"
      punit = kHz
      plist = range(1,100,1000) range(1000,1000,1000000)
      disabledphysics = semi/mc2/hp1
      useparam = on

Solver configurations
  sol1 "Solution 1" (study std1)
    v1: Variables "Dependent Variables 1"
    s1: Stationary "Stationary Solver 1" | stol = 1.0E-6; nonlin = on
      p1: Parametric | porder = constant
      fc1: FullyCoupled | linsolver = d1; initstep = 0.1; minstep = 1.0E-8; minsteprecovery = 0.001; maxiter = 50
      d1: Direct
  sol2 "Solution 2" (study std2)
    v1: Variables "Dependent Variables 1"
    s1: Stationary "Stationary Solver 1" | stol = 1.0E-6; nonlin = on
      p1: Parametric | porder = constant
      fc1: FullyCoupled | linsolver = d1; initstep = 0.1; minstep = 1.0E-10; minsteprecovery = 0.001; maxiter = 200
      d1: Direct
  sol3 "Solution 3" (study std3)
    v1: Variables "Dependent Variables 1"
    s1: Stationary "Stationary Solver 1" | stol = 1.0E-6
      p1: Parametric | porder = constant
      fc1: FullyCoupled | linsolver = d1; initstep = 0.1; minstep = 1.0E-10; minsteprecovery = 0.001; maxiter = 50
      d1: Direct
    su1: StoreSolution
    v2: Variables "Dependent Variables 2" | initmethod = sol; notsolmethod = sol
    s2: Stationary "Stationary Solver 2" | nonlin = linper; linpmethod = sol; storelinpoint = on
      p1: Parametric
        sweeptype = filled
        pname = {freq, Vg}
        plistarr = {10, range(0,0.4,8)}
        punit = {GHz, V}
        pcontinuationmode = no
      fc1: FullyCoupled | linsolver = d1
      d1: Direct
  sol5 "Solution 5" (study std4)
    v1: Variables "Dependent Variables 1"
    s1: Stationary "Stationary Solver 1" | stol = 1.0E-6
      p1: Parametric | porder = constant
      fc1: FullyCoupled | linsolver = d1; initstep = 0.1; minsteprecovery = 0.001; maxiter = 50
      d1: Direct
    su1: StoreSolution
    v2: Variables "Dependent Variables 2" | initmethod = sol; notsolmethod = sol
    s2: Stationary "Stationary Solver 2" | nonlin = linper; linpmethod = sol; storelinpoint = on
      p1: Parametric
        sweeptype = filled
        pname = {freq, Vd}
        plistarr = {F, range(0,0.05,0.6) range(1,0.5,4)}
        punit = {Hz, V}
        pcontinuationmode = no
      fc1: FullyCoupled | linsolver = d1
      d1: Direct
  sol7 "Solution 7" (study std5)
    v1: Variables "Dependent Variables 1"
    s1: Stationary "Stationary Solver 1" | stol = 1.0E-6
      p1: Parametric | porder = constant
      fc1: FullyCoupled | linsolver = d1; initstep = 0.1; minsteprecovery = 0.001; maxiter = 50
      d1: Direct
    su1: StoreSolution
    v2: Variables "Dependent Variables 2" | initmethod = sol; notsolmethod = sol
    s2: Stationary "Stationary Solver 2" | nonlin = linper; linpmethod = sol; storelinpoint = on
      p1: Parametric
        sweeptype = filled
        pname = {freq, Vg}
        plistarr = {range(1,100,1000) range(1000,1000,1000000), 0.4}
        punit = {kHz, V}
        pcontinuationmode = no
      fc1: FullyCoupled | linsolver = d1
      d1: Direct
  sol4 "Solution Store 1" (study std3)
  sol6 "Solution Store 2" (study std4)
  sol8 "Solution Store 3" (study std5)

Datasets
  dset1: Solution | solution = sol1
  dset2: Solution | solution = sol2
  dset3: Solution | solution = sol3
  dset4: Solution | solution = sol4
  dset5: Solution | solution = sol5
  dset6: Solution | solution = sol6
  dset7: Solution | solution = sol7
  dset8: Solution | solution = sol8

Plots
  pg1: PlotGroup2D "Electron Concentration (semi)" | data = dset1
    surf1: Surface | expr = semi.log10N
  pg2: PlotGroup2D "Hole Concentration (semi)" | data = dset1
    surf1: Surface | expr = semi.log10P
  pg3: PlotGroup2D "Electric Potential (semi)" | data = dset1
    surf1: Surface | expr = V
  pg4: PlotGroup1D "Id vs Vg" | data = dset1
    glob1: Global | expr = semi.I0_Drain; unit = uA; descr = Terminal current
  pg8: PlotGroup1D "Id vs Vd" | data = dset1
    glob1: Global | expr = semi.I0_Drain; unit = uA; descr = Terminal current; xdataexpr = semi.V0_Drain
  pg12: PlotGroup1D "gm vs Id" | data = dset3; xlabel = Drain current (µA); ylabel = Transconductance(uS)
    glob1: Global
      expr = semi.I0_Drain/Vac
      unit = uS
      differential = on
      xdataexpr = semi.I0_Drain
      xdataevalmethod = linpoint
      legends = Vg=2[V]
  pg19: PlotGroup1D "gm0 vs Id" | data = dset5; xlabel = Drain current (uA); ylabel = Ouput Conductance (uS)
    glob1: Global
      expr = semi.I0_Drain/Vac
      unit = uS
      differential = on
      xdata = expr
      xdataexpr = semi.I0_Drain
      xdataevalmethod = linpoint
      legends = Vg = 2V
  pg20: PlotGroup1D "Small signal Analysis" | data = dset7; ylabel = Transcunductance(uS)
    glob1: Global | expr = semi.I0_Drain/Vac; unit = uS; differential = on