// COMSOL Multiphysics 5.0.0.243 model "fsi.mph"
// Outline of the model tree

Parameters
  vR = 3996[m/s]  // Rayleigh wave velocity
  f0 = 433[MHz]  // Target frequency
  lambda0 = vR/f0  // Target wavelength
  w0 = lambda0/8  // Electrode width
  h0 = 5*lambda0  // Electrode length
  gap_port = 3*lambda0  // Horizontal gap between ports
  gap_term = lambda0  // Vertical gap between terminals
  N0 = 10  // Number of electrodes
  pitch = 8*w0  // Pitch of electrodes
  gap_vert = (N_cyc+2)*lambda0  // Distance of electrode from substrate wall along vertical direction
  gap_horiz = (N_cyc+2)*lambda0  // Distance of electrode from substrate wall along horizontal direction
  t0 = 5.5*lambda0  // Substrate thickness
  N_cyc = 3  // Number of cycles to simulate
  h_max = lambda0/5  // Maximum mesh size
  CFL = 0.2  // CFL number
  tstep = CFL*h_max/vR  // Maximum solver time step
  V0 = 10[V]  // Input voltage magnitude
  eta0 = 0.001  // Mechanical loss factor

Variables
  var1 "Variables 1"
    V_in = V0*sin(2*pi*f0*t)  // Input voltage
    V_cos = V0*cos(2*pi*f0*t)

Selections
  sel1: Explicit "v_in" on boundaries 14, 15, 18, 20, 22, 24, 26, 28, 30, 32, 34
  sel2: Explicit "v_cos" on boundaries 16, 17, 19, 21, 23, 25, 27, 29, 31, 33, 35
  sel3: Explicit "v_out" on boundaries 40, 41, 44, 46, 48, 50, 52, 54, 56, 58, 60
  sel4: Explicit "ground" on boundaries 42, 43, 45, 47, 49, 51, 53, 55, 57, 59, 61

Probes
  var1: GlobalVariable "Global Variable Probe 1" | expr = es.V0_3

Coordinate systems
  sys2: Rotated "Rotated System 2" | angle = {0, 38, 0}

Geometry
  geom1 "Geometry 1" (3D, length unit µm)
    imp1: Import | filename = C:\Users\Im\Desktop\Untitled.mphbin
    wp1: WorkPlane | quickplane = xz; unite = on
    sph1: Sphere | r = 200
    fin: Finalize "Form Union"

Materials
  mat1: Common "Lithium Niobate" on domains 2
    def "Basic"
      relpermittivity = diag{43.6, 43.6, 29.16}
      density = 4700[kg/m^3]
    StrainCharge "Strain-charge form"
      sE = {5.78e-012[1/Pa], -1.01e-012[1/Pa], -1.47e-012[1/Pa], -1.02e-012[1/Pa], 0[1/Pa], 0[1/Pa], -1.01e-012[1/Pa], 5.78e-012[1/Pa], -1.47e-012[1/Pa], 1.02e-012[1/Pa], 0[1/Pa], 0[1/Pa], -1.47e-012[1/Pa], -1.47e-012[1/Pa], 5.02e-012[1/Pa], 0[1/Pa], 0[1/Pa], 0[1/Pa], -1.02e-012[1/Pa], 1.02e-012[1/Pa], 0[1/Pa], 1.7e-011[1/Pa], 0[1/Pa], 0[1/Pa], 0[1/Pa], 0[1/Pa], 0[1/Pa], 0[1/Pa], 1.7e-011[1/Pa], -2.04e-012[1/Pa], 0[1/Pa], 0[1/Pa], 0[1/Pa], 0[1/Pa], -2.04e-012[1/Pa], 1.36e-011[1/Pa]}
      dET = {0[C/N], -2.1e-011[C/N], -1e-012[C/N], 0[C/N], 2.1e-011[C/N], -1e-012[C/N], 0[C/N], 0[C/N], 6e-012[C/N], 0[C/N], 6.8e-011[C/N], 0[C/N], 6.8e-011[C/N], 0[C/N], 0[C/N], -4.2e-011[C/N], 0[C/N], 0[C/N]}
      epsilonrT = diag{84, 84, 30}
      eta_sE = {0, 0, 0, 0, 0, 0, 0, 0, 0, 0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}
      eta_dET = {0, 0, 0, 0, 0, 0, 0, 0, 0, 0, 0, 0, 0, 0, 0, 0, 0, 0}
      eta_epsilonT = 0
    StressCharge "Stress-charge form"
      cE = {2.02897e+011[Pa], 5.29177e+010[Pa], 7.49098e+010[Pa], 8.99874e+009[Pa], 0[Pa], 0[Pa], 5.29177e+010[Pa], 2.02897e+011[Pa], 7.49098e+010[Pa], -8.99874e+009[Pa], 0[Pa], 0[Pa], 7.49098e+010[Pa], 7.49098e+010[Pa], 2.43075e+011[Pa], 0[Pa], 0[Pa], 0[Pa], 8.99874e+009[Pa], -8.99874e+009[Pa], 0[Pa], 5.99034e+010[Pa], 0[Pa], 0[Pa], 0[Pa], 0[Pa], 0[Pa], 0[Pa], 5.99018e+010[Pa], 8.98526e+009[Pa], 0[Pa], 0[Pa], 0[Pa], 0[Pa], 8.98526e+009[Pa], 7.48772e+010[Pa]}
      eES = {0[C/m^2], -2.53764[C/m^2], 0.193644[C/m^2], 0[C/m^2], 2.53764[C/m^2], 0.193644[C/m^2], 0[C/m^2], 0[C/m^2], 1.30863[C/m^2], 0[C/m^2], 3.69548[C/m^2], 0[C/m^2], 3.69594[C/m^2], 0[C/m^2], 0[C/m^2], -2.53384[C/m^2], 0[C/m^2], 0[C/m^2]}
      epsilonrS = diag{43.6, 43.6, 29.16}
      eta_cE = {0, 0, 0, 0, 0, 0, 0, 0, 0, 0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}
      eta_eES = {0, 0, 0, 0, 0, 0, 0, 0, 0, 0, 0, 0, 0, 0, 0, 0, 0, 0}
      eta_epsilonS = 0
  mat3: Common "Copper" on domains 3
    def "Basic"
      relpermeability = 1
      electricconductivity = 5.998e7[S/m]
      heatcapacity = 385[J/(kg*K)]
      relpermittivity = 1
      emissivity = 0.5
      density = 8700[kg/m^3]
      thermalconductivity = 400[W/(m*K)]
    linzRes "Linearized resistivity"
      rho0 = 1.72e-8[ohm*m]
      alpha = 3.9e-3[1/K]
      Tref = 273.15[K]
  mat5: Common "Air" on domains 1
    def "Basic"
      relpermeability = 1
      relpermittivity = 1
      dynamicviscosity = eta(T[1/K])[Pa*s]
      ratioofspecificheat = 1.4
      electricconductivity = 0[S/m]
      heatcapacity = Cp(T[1/K])[J/(kg*K)]
      density = rho(pA[1/Pa],T[1/K])[kg/m^3]
      thermalconductivity = k(T[1/K])[W/(m*K)]
      soundspeed = cs(T[1/K])[m/s]
      eta: Piecewise | arg = T; extrap = constant; pieces = {200.0, 1600.0, -8.38278E-7+8.35717342E-8*T^1-7.69429583E-11*T^2+4.6437266E-14*T^3-1.06585607E-17*T^4}
      Cp: Piecewise | arg = T; extrap = constant; pieces = {200.0, 1600.0, 1047.63657-0.372589265*T^1+9.45304214E-4*T^2-6.02409443E-7*T^3+1.2858961E-10*T^4}
      rho: Analytic | expr = pA*0.02897/8.314/T; args = {pA, T}; dermethod = manual; argders = {{pA, d(pA*0.02897/8.314/T,pA)}, {T, d(pA*0.02897/8.314/T,T)}}
      k: Piecewise | arg = T; extrap = constant; pieces = {200.0, 1600.0, -0.00227583562+1.15480022E-4*T^1-7.90252856E-8*T^2+4.11702505E-11*T^3-7.43864331E-15*T^4}
      cs: Analytic | expr = sqrt(1.4*287*T); args = T; dermethod = manual; argders = {T, d(sqrt(1.4*287*T),T)}
    RefractiveIndex
      n = 1
      ki = 0

Physics
  actd: TransientPressureAcoustics "Pressure Acoustics, Transient" on domains 1
    dependent variable p
    tpam1: TransientPressureAcousticsModel (default)
    shb1: SoundHard "Sound Hard Boundary (Wall) 1" (default)
    init1: init "Initial Values 1" (default)
  solid: SolidMechanics on domains 2
    dependent variable u = {u, v, w}
    lemm1: LinearElasticModel "Linear Elastic Material 1" (default)
    free1: Free (default)
    init1: init "Initial Values 1" (default)
    pzm1: PiezoelectricMaterialModel "Piezoelectric Material 1" on domains 2
      dmp1: Damping "Mechanical Damping 1" on all domains | DampingType = RayleighDamping; beta_dK = eta0/(2*pi*f0)
  es: Electrostatics on all domains
    dependent variable V
    ccn1: ChargeConservation (default)
    zc1: ZeroCharge (default)
    init1: init "Initial Values 1" (default)
    ccnp1: ChargeConservationPiezo "Charge Conservation, Piezoelectric 1" on domains 2
    gnd1: Ground on selection sel4
    term1: Terminal on no boundaries | TerminalType = Voltage; V0 = V_in
    term2: Terminal on no boundaries | TerminalType = Voltage; V0 = V_cos
    term3: Terminal on selection sel3
  ec: ConductiveMedia "Electric Currents" on domains 3
    dependent variable V2
    cucn1: CurrentConservation (default)
    ein1: ElectricInsulation (default)
    init1: init "Initial Values 1" (default)
    gnd1: Ground on boundaries 9-12, 63

Multiphysics
  asb1: AcousticStructureBoundary on all boundaries | Acoustics_physics = actd; Structure_physics = solid
  pze1: PiezoelectricEffect on all domains | Solid_physics = solid; Electrostatics_physics = es

Mesh
  mesh1 "Mesh 1" (physics-controlled)
    size: MeshSizeDefault | hauto = 5

Studies
  std1 "Study 1"
    time: Transient "Time Dependent" | tlist = range(0,0.1,1)