// COMSOL Multiphysics 5.0.0.243 model "saw.mph"
// Piezo saw transient 50
// Outline of the model tree

Parameters
  vR = 3996[m/s]  // Rayleigh wave velocity
  f0 = 433[MHz]  // Target frequency
  lambda0 = vR/f0  // Target wavelength
  w0 = lambda0/8  // Electrode width
  h0 = 5*lambda0  // Electrode length
  gap_port = 3*lambda0  // Horizontal gap between ports
  gap_term = lambda0  // Vertical gap between terminals
  N0 = 10  // Number of electrodes
  pitch = 8*w0  // Pitch of electrodes
  gap_vert = (N_cyc+2)*lambda0  // Distance of electrode from substrate wall along vertical direction
  gap_horiz = (N_cyc+2)*lambda0  // Distance of electrode from substrate wall along horizontal direction
  t0 = 5.5*lambda0  // Substrate thickness
  N_cyc = 3  // Number of cycles to simulate
  h_max = lambda0/5  // Maximum mesh size
  CFL = 0.2  // CFL number
  tstep = CFL*h_max/vR  // Maximum solver time step
  V0 = 10[V]  // Input voltage magnitude
  eta0 = 0.001  // Mechanical loss factor

Variables
  var1 "Variables 1"
    V_in = V0*sin(2*pi*f0*t)  // Input voltage
    V_cos = V0*cos(2*pi*f0*t)

Selections
  sel1: Explicit "Ground" on boundaries 12, 13, 15, 17, 19, 21, 23, 25, 27, 29, 31, 34, 35, 37, 39, 41, 43, 45, 47, 49, 51, 53
  sel2: Explicit "V_in" on boundaries 10, 11, 14, 16, 18, 20, 22, 24, 26, 28, 30
  sel3: Explicit "V_out" on boundaries 32, 33, 36, 38, 40, 42, 44, 46, 48, 50, 52

Probes
  var1: GlobalVariable "Global Variable Probe 1" | expr = es.V0_2; table = tbl1

Coordinate systems
  sys2: Rotated "Rotated System 2" | angle = {0, 38[deg], 0}

Geometry
  geom1 "Geometry 1" (3D, length unit µm)
    wp1: WorkPlane
      planetype = quick
      quickplane = xz
      quickoffsettype = distance
      offsettype = distance
      circpoint = startvertex
      genpoints = {{0, 0, 0}, {1, 0, 0}, {0, 1, 0}}
      transaxistype = z
      quickorigin = global
      quickaxis = natural
      origin = facecenter
      faceparallelaxis = s1
      edgeparallelorigin = startvertex
      edgeparallelaxis = tangent
      r1: Rectangle | pos = {gap_port/2, -(h0+gap_term)/2}; type = solid; base = corner; layerbottom = on; size = {w0, h0}
      arr1: Array
        input = r1
        size = {N0, 1}
        type = rectangular
        linearsize = 1
        fullsize = {N0, 1}
        displconstr = {on, on}
        displ = {pitch, 0}
      r2: Rectangle
        pos = {gap_port/2, -(h0+gap_term)/2-2*w0}
        type = solid
        base = corner
        layerbottom = on
        size = {(N0-1)*pitch+w0, 2*w0}
      mir1: Mirror | input = arr1, r2; keep = on; posconstr = {on, on}; axisconstr = {on, on}; axis = {0, 1}
      mov1: Move | input = mir1; displx = 3*pitch/8
      mir2: Mirror | input = arr1, mov1, r2; keep = on; posconstr = {on, on}; axisconstr = {on, on}; axis = {1, 0}
      r3: Rectangle
        type = solid
        base = center
        layerbottom = on
        size = {2*((N0-1)*pitch+w0+gap_horiz)+pitch+gap_port, 4*w0+2*gap_vert+h0+gap_term}
    ext1: Extrude
      extrudefrom = workplane
      workplane = wp1
      input = wp1.r3
      unite = on
      distance = t0
      crossfaces = on
      reverse = on
      scale = {1, 1}
      polres = 50
      baseid = {0, 1, 2}
    wp2: WorkPlane | quickplane = xz; quicky = t0; unite = on
      r1: Rectangle
        type = solid
        base = center
        layerbottom = on
        size = {2*((N0-1)*pitch+w0+gap_horiz)+pitch+gap_port, 4*w0+2*gap_vert+h0+gap_term}
    ext2: Extrude | input = wp2; distance = 0.001
    fin: Finalize "Form Union"

Materials
  mat1: Common "Lithium Niobate" on domains 1
    def "Basic"
      relpermittivity = diag{43.6, 43.6, 29.16}
      density = 4700[kg/m^3]
    StrainCharge "Strain-charge form"
      sE = {5.78e-012[1/Pa], -1.01e-012[1/Pa], -1.47e-012[1/Pa], -1.02e-012[1/Pa], 0[1/Pa], 0[1/Pa], -1.01e-012[1/Pa], 5.78e-012[1/Pa], -1.47e-012[1/Pa], 1.02e-012[1/Pa], 0[1/Pa], 0[1/Pa], -1.47e-012[1/Pa], -1.47e-012[1/Pa], 5.02e-012[1/Pa], 0[1/Pa], 0[1/Pa], 0[1/Pa], -1.02e-012[1/Pa], 1.02e-012[1/Pa], 0[1/Pa], 1.7e-011[1/Pa], 0[1/Pa], 0[1/Pa], 0[1/Pa], 0[1/Pa], 0[1/Pa], 0[1/Pa], 1.7e-011[1/Pa], -2.04e-012[1/Pa], 0[1/Pa], 0[1/Pa], 0[1/Pa], 0[1/Pa], -2.04e-012[1/Pa], 1.36e-011[1/Pa]}
      dET = {0[C/N], -2.1e-011[C/N], -1e-012[C/N], 0[C/N], 2.1e-011[C/N], -1e-012[C/N], 0[C/N], 0[C/N], 6e-012[C/N], 0[C/N], 6.8e-011[C/N], 0[C/N], 6.8e-011[C/N], 0[C/N], 0[C/N], -4.2e-011[C/N], 0[C/N], 0[C/N]}
      epsilonrT = diag{84, 84, 30}
      eta_sE = {0, 0, 0, 0, 0, 0, 0, 0, 0, 0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}
      eta_dET = {0, 0, 0, 0, 0, 0, 0, 0, 0, 0, 0, 0, 0, 0, 0, 0, 0, 0}
      eta_epsilonT = 0
    StressCharge "Stress-charge form"
      cE = {2.02897e+011[Pa], 5.29177e+010[Pa], 7.49098e+010[Pa], 8.99874e+009[Pa], 0[Pa], 0[Pa], 5.29177e+010[Pa], 2.02897e+011[Pa], 7.49098e+010[Pa], -8.99874e+009[Pa], 0[Pa], 0[Pa], 7.49098e+010[Pa], 7.49098e+010[Pa], 2.43075e+011[Pa], 0[Pa], 0[Pa], 0[Pa], 8.99874e+009[Pa], -8.99874e+009[Pa], 0[Pa], 5.99034e+010[Pa], 0[Pa], 0[Pa], 0[Pa], 0[Pa], 0[Pa], 0[Pa], 5.99018e+010[Pa], 8.98526e+009[Pa], 0[Pa], 0[Pa], 0[Pa], 0[Pa], 8.98526e+009[Pa], 7.48772e+010[Pa]}
      eES = {0[C/m^2], -2.53764[C/m^2], 0.193644[C/m^2], 0[C/m^2], 2.53764[C/m^2], 0.193644[C/m^2], 0[C/m^2], 0[C/m^2], 1.30863[C/m^2], 0[C/m^2], 3.69548[C/m^2], 0[C/m^2], 3.69594[C/m^2], 0[C/m^2], 0[C/m^2], -2.53384[C/m^2], 0[C/m^2], 0[C/m^2]}
      epsilonrS = diag{43.6, 43.6, 29.16}
      eta_cE = {0, 0, 0, 0, 0, 0, 0, 0, 0, 0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}
      eta_eES = {0, 0, 0, 0, 0, 0, 0, 0, 0, 0, 0, 0, 0, 0, 0, 0, 0, 0}
      eta_epsilonS = 0

Physics
  solid: SolidMechanics on all domains
    dependent variable u = {u, v, w}
    lemm1: LinearElasticModel "Linear Elastic Material 1" (default)
    free1: Free (default)
    init1: init "Initial Values 1" (default)
    pzm1: PiezoelectricMaterialModel "Piezoelectric Material 1" on all domains | coordinateSystem = sys2
      dmp1: Damping "Mechanical Damping 1" on all domains | DampingType = RayleighDamping; beta_dK = eta0/(2*pi*f0)
    lrb1: LowReflectingBoundary on boundaries 1, 3-5, 7-9, 54, 55 | DampingType = PSwaves
  es: Electrostatics on all domains
    dependent variable V
    ccn1: ChargeConservation (default)
    zc1: ZeroCharge (default)
    init1: init "Initial Values 1" (default)
    ccnp1: ChargeConservationPiezo "Charge Conservation, Piezoelectric 1" on all domains
    gnd1: Ground on selection sel1
    term1: Terminal on selection sel2 | TerminalType = Voltage; V0 = V_in
    term2: Terminal on selection sel3

Multiphysics
  pze1: PiezoelectricEffect on all domains | Solid_physics = solid; Electrostatics_physics = es

Mesh
  mesh1 "Mesh 1"
    size: MeshSizeDefault | hmax = h_max; hmin = h_max/2; hauto = 5; custom = on
    fq1: FreeQuad on boundaries 2, 10-53
    swe1: Sweep "Swept 1" on remaining entities
      dis1: Distribution on all domains | type = predefined; elemcount = 5*t0/lambda0; elemratio = 10*t0/lambda0

Studies
  std1 "Study 1"
    time: Transient "Time Dependent" | tlist = range(0,4*tstep,N_cyc/f0)

Solver configurations
  sol1 "Solution 1" (study std1)
    v1: Variables "Dependent Variables 1"
      comp1_u: Field "Displacement field (Material) (comp1.u)" | scalemethod = manual; scaleval = 1e-2*0.000258607761902
    t1: Time "Time-Dependent Solver 1"
      tlist = range(0,4*tstep,N_cyc/f0)
      atolglobalmethod = scaled
      atolglobal = 0.001
      timemethod = genalpha
      tstepsgenalpha = manual
      rhoinf = 0.5
      timestepgenalpha = tstep
      fc1: FullyCoupled | linsolver = i1
      i1: Iterative
        mg1: Multigrid

Datasets
  dset1: Solution | solution = sol1
  dset2: Solution "Probe Solution 2" | solution = sol1
  cln1: CutLine3D
    data = dset1
    genpoints = 
      {-(2*((N0-1)*pitch+w0+gap_horiz)+pitch+gap_port), 0, 0}
      {2*((N0-1)*pitch+w0+gap_horiz)+pitch+gap_port, 0, 0}
  cln2: CutLine3D | data = dset1; genpoints = {{-(gap_port+w0)/2, 0, 0}, {-(gap_port+w0)/2, t0, 0}}

Derived values
  gev1: EvalGlobal "Global Variable Probe 1" | data = dset2; table = tbl1; expr = es.V0_2

Tables
  tbl1: Table "Probe Table 1"
    t | Terminal voltage (V), Global Variable Probe 1
    0 | 0
    9.23788e-11 | 0.120798
    1.84758e-10 | 0.24087
    2.77136e-10 | 0.317582
    3.69515e-10 | 0.378904
    4.61894e-10 | 0.41982
    5.54273e-10 | 0.434901
    6.46651e-10 | 0.42422
    7.3903e-10 | 0.388224
    8.31409e-10 | 0.323672
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
Plots
  pg1: PlotGroup3D "Displacement - Y component" | data = dset1
    surf1: Surface | expr = v; unit = nm
      def1: Deform "Deformation 1" | expr = {u, v, w}
  pg2: PlotGroup1D "Probe Plot Group 2"
    tblp1: Table "Probe Table Graph 1" | table = tbl1
  pg3: PlotGroup1D "Input and Ouput Voltages" | data = dset1; title = Voltage vs. Time; ylabel = Voltage (V)
    glob1: Global
      expr = {es.V0_1, 10*es.V0_2}
      unit = {V, V}
      descr = {Terminal voltage, }
      legends = {Input voltage, 10 X Output voltage}
  pg4: PlotGroup3D "Coordinate System" | data = dset1
    sysv1: CoordSysVolume "Coordinate System Volume 1" | sys = sys2; xnumber = 3; ynumber = 1; znumber = 3
  pg5: PlotGroup1D "Displacement along wave direction"
    data = none
    title = Y-displacement along X-direction
    ylabel = Displacement (nm)
    lngr1: LineGraph | data = cln1; expr = -v; unit = nm; xdata = expr; xdataexpr = X; legends = 1.1 ns
    lngr2: LineGraph | data = cln1; expr = -v+0.5[nm]; unit = nm; xdata = expr; xdataexpr = X; legends = 5.5 ns
  pg6: PlotGroup1D "Displacement along thickness"
    data = cln2
    title = Y-displacement along Y-direction
    ylabel = Displacement (nm)
    lngr1: LineGraph | expr = -v; unit = nm; xdata = expr; xdataexpr = Y